*Heading
 this is a test mesh for an Abaqus dynamic simulation of our Kaltoff-Winkler plate problem
** Job name: AbaqusPlateTest Model name: Model-1
** Generated by: Abaqus/CAE 6.12-3
*Preprint, echo=NO, model=NO, history=NO, contact=NO
**
** PARTS
**
*Part, name=Part-4
*Node
1, 50.000000000000, 25.000000000000
2, 100.000000000000, 25.000000000000
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*Element, type=CPE3
1, 1, 9, 170
2, 322, 68, 379
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*Element, type=COH2D4
577, 314, 370, 373, 315
578, 372, 366, 369, 373
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*Nset, nset=Set-1
1, 4, 5, 6, 27, 28
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*Elset, elset=Set-1
217, 218, 219, 220, 221, 222
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*Nset, nset=Set-2
1, 2, 3, 4, 9, 10
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*Elset, elset=Set-2
1, 2, 3, 4, 5, 6
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*Nset, nset=Set-3
1, 2, 5, 7, 8, 9
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*Elset, elset=Set-3
433, 434, 435, 436, 437, 438
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** Section: Section-2
*Solid Section, elset=Set-2, material=Material-2
,
** Section: Section-1
*Solid Section, elset=Set-1, material=Material-1
,
** Section: Section-3
*Solid Section, elset=Set-3, material=Material-3
,
*Elset, elset=CZMSet-1
577, 578, 579, 580, 581, 582
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*Cohesive Section, elset=CZMSet-1, material=CZMMaterial-1, response=TRACTION SEPARATION, thickness=SPECIFIED
1., 1.
*End Part
**
**
** ASSEMBLY
**
*Assembly, name=Assembly
**
*Instance, name=Part-4-1, part=Part-4
*End Instance
**
*Nset, nset=BC2, instance=Part-4-1
2, 317, 3, 855, 14, 408
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*Elset, elset=BC2, instance=Part-4-1
6, 12, 18, 24, 30, 36, 42, 48, 54
*Nset, nset=BC3, instance=Part-4-1
7, 7, 8, 8, 53, 53
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*Elset, elset=BC3, instance=Part-4-1
109, 110, 111, 112, 113, 114, 115, 116, 117, 118, 119, 120
*Nset, nset=Set-5, instance=Part-4-1
318, 318, 8, 8, 64, 64, 64, 64, 65, 65, 65, 65
*Elset, elset=Set-5, instance=Part-4-1
120, 132, 144
*Nset, nset=BC1, instance=Part-4-1
5, 5, 6, 6, 45, 45
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*Elset, elset=BC1, instance=Part-4-1
55, 61, 67, 73, 79, 85, 91, 97, 103
*Nset, nset=Set-4, instance=Part-4-1
321, 321, 7, 7, 66, 66, 66, 66, 67, 67, 67, 67
*Elset, elset=Set-4, instance=Part-4-1
109, 121, 133
*End Assembly
*Amplitude, name=Amp-1
             0.,              0.,              1.,          0.1
**
** MATERIALS
**
*Material, name=Material-1
*Density
 8e-06,
*Elastic
29000., 0.3
*Material, name=Material-2
*Density
 8e-06,
*Elastic
29000., 0.3
*Material, name=Material-3
*Density
 8e-06,
*Elastic
29000., 0.3
**
** BOUNDARY CONDITIONS
**
** Name: BC-2 Type: Symmetry/Antisymmetry/Encastre
*Material, name=CZMMaterial-1
*Damage Initiation, criterion=MAXS
1.0e7,1.0e7,1.0e7
*Damage Evolution, type=DISPLACEMENT
 0.2,
*Elastic, type=TRACTION
10000000.,10000000.,10000000.
*Boundary
BC2, XSYMM
** Name: BC-3 Type: Symmetry/Antisymmetry/Encastre
*Boundary
BC3, YSYMM
** Name: BC-5 Type: Symmetry/Antisymmetry/Encastre
*Boundary
Set-5, XSYMM
** ----------------------------------------------------------------
**
** STEP: Step-1
**
*Step, name=Step-1, inc=20
*Static, direct
0.1, 1.,
**
** BOUNDARY CONDITIONS
**
** BOUNDARY CONDITIONS
**
** Name: BC-1 Type: Displacement/Rotation
*Boundary, amplitude=Amp-1
BC1, 1, 1, 1.
** Name: BC-4 Type: Displacement/Rotation
*Boundary, amplitude=Amp-1
Set-4, 1, 1, 1.
**
** OUTPUT REQUESTS
**
*Restart, write, frequency=0
**
** FIELD OUTPUT: F-Output-1
**
*Output, field, variable=PRESELECT
**
** HISTORY OUTPUT: H-Output-1
**
*Output, history, variable=PRESELECT
*End Step
