*Heading
** Job name: PlateTest Model name: Model-1
** Generated by: Abaqus/CAE 6.13-4
*Preprint, echo=NO, model=NO, history=NO, contact=NO
**
** PARTS
**
*Part, name=Part-4
*Node
      1,           0.,          25.
      2,          50.,          25.
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*Element, type=CPE6M
   1,   644,     9,    10, 10329, 10330, 10331
   2,   751,   607,   644, 10332, 10333, 10334
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*Nset, nset=Set-1
     1,     2,     3,     4,     5,     6
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*Elset, elset=Set-1, generate
    1,  5377,     1
*Nset, nset=Set-2
     2,     3,     6,     7,     8,    58
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*Elset, elset=Set-2, generate
  5378,  20330,      1
*Nset, nset=Set-5
     1,     2,     5,     6,     9,    10
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*Elset, elset=Set-5, generate
 3898,  5377,     1
*Nset, nset=Set-6
     1,     2,     3,     4,     9,    10
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*Elset, elset=Set-6, generate
    1,  3897,     1
** Section: Section-1
*Solid Section, elset=Set-6, material=Steel
,
** Section: Section-3
*Solid Section, elset=Set-5, material=Steel3
,
** Section: Section-2
*Solid Section, elset=Set-2, material=Steel2
,
*End Part
**
**
** ASSEMBLY
**
*Assembly, name=Assembly
**
*Instance, name=Part-4-1, part=Part-4
*End Instance
**
*Nset, nset=Set-11, instance=Part-4-1
     5,     6,     7,   184,   185,   186
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*Elset, elset=Set-11, instance=Part-4-1
  3900,  3919,  3921,  4007,  4022,  4023
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*Nset, nset=Set-12, instance=Part-4-1
     7,     8,   320,   321,   322,   323
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*Elset, elset=Set-12, instance=Part-4-1
  5921,  5952,  5967,  5982,  6042,  6057
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*Nset, nset=Set-13, instance=Part-4-1
     1,     5,   242,   243,   244,   245
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*Elset, elset=Set-3, instance=Part-4-1
 3958, 4105, 4184, 4266, 4386, 4592, 4593, 5259, 5296, 5310
*Nset, nset=Set-14, instance=Part-4-1
     1,     4,   161,   162,   163,   164
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*Elset, elset=Set-14, instance=Part-4-1
   68,   69,   70,   71,  225,  244
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*End Assembly
**
** MATERIALS
**
*Material, name=Steel
*Density
 8e-06,
*Elastic
190000., 0.3
*Material, name=Steel2
*Density
 8e-06,
*Elastic
190000., 0.3
*Material, name=Steel3
*Density
 8e-06,
*Elastic
190000., 0.3
** ----------------------------------------------------------------
**
** STEP: Step-1
**
*Step, name=Step-1, nlgeom=NO
*Static
1., 1., 1e-05, 1.
**
** BOUNDARY CONDITIONS
**
** Name: BC-1 Type: Symmetry/Antisymmetry/Encastre
*Boundary
Set-11, YSYMM
** Name: BC-2 Type: Symmetry/Antisymmetry/Encastre
*Boundary
Set-12, XSYMM
** Name: BC-3 Type: Symmetry/Antisymmetry/Encastre
*Boundary
Set-13, XSYMM
** Name: BC-4 Type: Symmetry/Antisymmetry/Encastre
*Boundary
Set-14, XSYMM
**
** OUTPUT REQUESTS
**
*Restart, write, frequency=0
**
** FIELD OUTPUT: F-Output-1
**
*Output, field, variable=PRESELECT
**
** HISTORY OUTPUT: H-Output-1
**
*Output, history, variable=PRESELECT
*End Step
